a := 16.124
b := 1.365
c := 76.69
x1 := (a + b^3)/nthroot(c + a, 3) = 4.12297
n := 50
x1 := 2.56
sum((x1^i + 1)/(i - 1)!, i = 1 .. n) = 35.834
integral(x^2/(1 + x^2), x) → x - atan(x)
integral(x*e^x*ln(x), x = 1 .. ∞) → ∞
m1 := 0.5 kg
m2 := 0.2 kg
l := 3 m
v := 36 kph
xl := l*m2/(m1 + m2) = 0.857143 m
Vs := v*m2/(m1 + m2) = 2.85714 m/s
T := m1*Vs^2/x1 = 1.59439 N*m
