A := [3, -5, 8, 5; 0, 1, 2, 4; -3, 3, -4, 0; 1, 5, 1, 4]
B := [5; -5; 3; 1]
X1 := A*(1.256/c) = [
    1.25687e-8, -2.09478e-8, 3.35165e-8, 2.09478e-8;
    0, 4.18957e-9, 8.37913e-9, 1.67583e-8;
    -1.25687e-8, 1.25687e-8, -1.67583e-8, 0;
    4.18957e-9, 2.09478e-8, 4.18957e-9, 1.67583e-8
] s/m
X2 := A^2*B + B*1.2 = [-213; -137; -20.4; 1.2]
X3 := transpose(A) = [3, 0, -3, 1; -5, 1, 3, 5; 8, 2, -4, 1; 5, 4, 0, 4]
X4 := transpose(B)*A*transpose(A)*B = 747
M[22] := det([3, 8, 5; -3, -4, 0; 1, 1, 4]) = 53
X := lsolve(A, B) = [978; -525; -1128; 694]
X := lsolve(A*transpose(A)*A^2, B) = [3.04463e9; -1.61401e9; -3.47846e9; 2.13552e9]
ORIGIN := 1
i := 1 .. 5
j := 1 .. 5
M1[i, j] := i^2 - 3*j
M1 = [-2, -5, -8, -11, -14; 1, -2, -5, -8, -11; 6, 3, 0, -3, -6; 13, 10, 7, 4, 1; 22, 19, 16, 13, 10]
product(M1[i, j], i = 1 .. 5) = [-3432; 5700; 0; -13728; -9240]
